# Initialize simulation

variable nsteps index 100
#variable nrep equal 10
variable a equal 5.65
units           metal

# generate the box and atom positions using a BCC lattice

variable nx equal ${nrep}
variable ny equal ${nrep}
variable nz equal ${nrep}

boundary        p p p

lattice         diamond $a
region          box block 0 ${nx} 0 ${ny} 0 ${nz}
create_box      1 box
create_atoms    1 box

mass 1 58.7

# specify potential

#include Si_pot.mod
pair_style pace product
pair_coeff * * Ge_pot.yace Ge

#thermo_style    custom step temp epair c_energy etotal press v_press
thermo_style custom step temp epair etotal press
thermo          10
thermo_modify norm yes

# Set up NVE run

timestep 0.5e-3
neighbor 1.0 bin
neigh_modify once no every 1 delay 0 check yes

# Run MD

velocity all create 1200.0 4928459 loop geom
#dump 1 all xyz 10 dump.xyz
fix 1 all nve
run             ${nsteps}
